// SBML level 2 version 3
// This model was downloaded from BioModels Database
// http://www.ebi.ac.uk/biomodels/

model MODEL8390025091()
  // Chickarmane2008 - Stem cell lineage determination
  // In this work, a dynamical model of lineage determination based upon a minimal circuit, as discussed in PMID: 17215298 , which contains the Oct4/Sox2/Nanog core as well its interaction with a few other key genes is discussed.
  // This model is described in the article:
  // A computational model for understanding stem cell, trophectoderm and endoderm lineage determination.
  // Chickarmane V, Peterson C
  // PloS one. 2008, 3(10):e3478
  // Abstract:
  // BACKGROUND: Recent studies have associated the transcription factors, Oct4, Sox2 and Nanog as parts of a self-regulating network which is responsible for maintaining embryonic stem cell properties: self renewal and pluripotency. In addition, mutual antagonism between two of these and other master regulators have been shown to regulate lineage determination. In particular, an excess of Cdx2 over Oct4 determines the trophectoderm lineage whereas an excess of Gata-6 over Nanog determines differentiation into the endoderm lineage. Also, under/over-expression studies of the master regulator Oct4 have revealed that some self-renewal/pluripotency as well as differentiation genes are expressed in a biphasic manner with respect to the concentration of Oct4. METHODOLOGY/
  // PRINCIPAL FINDINGS: We construct a dynamical model of a minimalistic network, extracted from ChIP-on-chip and microarray data as well as literature studies. The model is based upon differential equations and makes two plausible assumptions; activation of Gata-6 by Oct4 and repression of Nanog by an Oct4-Gata-6 heterodimer. With these assumptions, the results of simulations successfully describe the biphasic behavior as well as lineage commitment. The model also predicts that reprogramming the network from a differentiated state, in particular the endoderm state, into a stem cell state, is best achieved by over-expressing Nanog, rather than by suppression of differentiation genes such as Gata-6.
  // CONCLUSIONS: The computational model provides a mechanistic understanding of how different lineages arise from the dynamics of the underlying regulatory network. It provides a framework to explore strategies of reprogramming a cell from a differentiated state to a stem cell state through directed perturbations. Such an approach is highly relevant to regenerative medicine since it allows for a rapid search over the host of possibilities for reprogramming to a stem cell state.
  // This model is hosted on BioModels Database and identified by: MODEL8390025091 .
  // To cite BioModels Database, please use: BioModels Database: An enhanced, curated and annotated resource for published quantitative kinetic models .
  // To the extent possible under law, all copyright and related or neighbouring rights to this encoded model have been dedicated to the public domain worldwide. Please refer to CC0 Public Domain Dedication for more information.
  // biomodels.db:MODEL8390025091
  // biomodels.db:BIOMD0000000209
  // isDescribedBy pubmed:18941526
  // isDerivedFrom biomodels.db:BIOMD0000000204 biomodels.db:BIOMD0000000203
  // isVersionOf GO:0042663 GO:0001830 GO:0048863
  // occursIn taxonomy:9606

  // Compartments:
  compartment cell = 1;  // isVersionOf GO:0005623

  // Species:
  substanceOnly species $OCT4_Gene in cell = 0;  // isVersionOf ensembl:ENSG00000204531; encodes uniprot:Q01860
  substanceOnly species $NANOG_Gene in cell = 0;  // isVersionOf ensembl:ENSG00000176654; encodes uniprot:Q8N7R0
  substanceOnly species $SOX2_Gene in cell = 0;  // encodes ensembl:ENSG00000165661 uniprot:Q6ZRP7
  substanceOnly species $GATA6_Gene in cell = 0;  // isVersionOf ensembl:ENSG00000141448; encodes uniprot:Q92908
  substanceOnly species $CDX2_Gene in cell = 0;  // isVersionOf ensembl:ENSG00000165556; encodes uniprot:Q99626
  substanceOnly species $GCNF_Gene in cell = 0;  // isVersionOf ensembl:ENSG00000148200; encodes uniprot:Q15406
  substanceOnly species $targetGene in cell = 0.01*cell;
  substanceOnly species $degradation in cell = 0;
  substanceOnly species $p53 in cell = 0;  // isVersionOf uniprot:P04637
  substanceOnly species $A in cell = 25*cell;  // isVersionOf GO:0042813
  substanceOnly species $SG in cell = 0;
  substanceOnly species $SN in cell = 0;
  substanceOnly species OCT4 in cell = 0.01*cell;  // isVersionOf uniprot:Q01860
  substanceOnly species SOX2 in cell = 0.01*cell;  // isVersionOf uniprot:Q6ZRP7
  substanceOnly species NANOG in cell = 0.01*cell;  // isVersionOf uniprot:Q8N7R0
  substanceOnly species GATA6 in cell = 0.01*cell;  // isVersionOf uniprot:Q92908
  substanceOnly species CDX2 in cell = 0.01*cell;  // isVersionOf uniprot:Q99626
  substanceOnly species GCNF in cell = 0.01*cell;  // isVersionOf uniprot:Q15406
  substanceOnly species OCT4_SOX2 in cell = 0.1*cell;  // hasPart uniprot:Q01860 uniprot:Q6ZRP7
  substanceOnly species Protein in cell = 0;

  // Parameters:
  a0 = 0.001;
  a1 = 1;
  a2 = 0.005;
  a3 = 0.025;
  b0 = 1;
  b1 = 0.001;
  b2 = 0.005;
  b3 = 0.025;
  b4 = 10;
  b5 = 10;
  gamma1 = 0.1;
  c0 = 0.001;
  c1 = 0.005;
  c2 = 0.025;
  d0 = 0.001;
  d1 = 0.005;
  d2 = 0.025;
  d3 = 0.05;
  gamma2 = 0.1;
  e0 = 0.001;
  e1 = 0.1;
  e2 = 0.1;
  e3 = 1;
  f0 = 0.001;
  f1 = 0.1;
  f2 = 0.1;
  f3 = 10;
  f4 = 1;
  gamma3 = 0.1;
  g0 = 0.001;
  g1 = 2;
  h0 = 2;
  h1 = 5;
  gamma4 = 0.1;
  i0 = 0.001;
  i1 = 0.1;
  i2 = 0.1;
  j0 = 0.1;
  j1 = 0.1;
  gamma5 = 0.1;
  p0 = 0.1;
  p1 = 1;
  p2 = 0.00025;
  q0 = 1;
  q1 = 0.00025;
  q2 = 15;
  q3 = 10;
  gammag = 0.1;
  gamman = 0.01;

  // Reactions:
  R1: $OCT4_Gene => OCT4; (a0 + a1*A + a2*OCT4*SOX2 + a3*OCT4*SOX2*NANOG)/(1 + b0*A + b1*OCT4 + b2*OCT4*SOX2 + b3*OCT4*SOX2*NANOG + b4*CDX2*OCT4 + b5*GCNF);  // modifiers: A, SOX2, NANOG, CDX2, GCNF; isVersionOf GO:0010467
  R2: OCT4 => $degradation; gamma1*OCT4;  // isVersionOf GO:0030163
  R3: $SOX2_Gene => SOX2; (c0 + c1*OCT4*SOX2 + c2*OCT4*SOX2*NANOG)/(1 + d0*OCT4 + d1*OCT4*SOX2 + d2*OCT4*SOX2*NANOG);  // modifiers: OCT4, NANOG; isVersionOf GO:0010467
  R4: SOX2 => $degradation; gamma2*SOX2;  // isVersionOf GO:0030163
  R5: $NANOG_Gene => NANOG; (e0 + e1*OCT4*SOX2 + e2*OCT4*SOX2*NANOG + e3*SN)/(1 + f0*OCT4 + f1*OCT4*SOX2 + f2*OCT4*SOX2*NANOG + f3*OCT4*GATA6 + f4*SN);  // modifiers: OCT4, SOX2, GATA6, SN; isVersionOf GO:0010467
  R6: NANOG => $degradation; gamma3*NANOG;  // isVersionOf GO:0030163
  R7: $CDX2_Gene => CDX2; (g0 + g1*CDX2)/(1 + h0*CDX2 + h1*CDX2*OCT4);  // modifiers: OCT4; isVersionOf GO:0010467
  R8: CDX2 => $degradation; gamma4*CDX2;  // isVersionOf GO:0030163
  R9: $GCNF_Gene => GCNF; (i0 + i1*CDX2 + i2*GATA6)/(1 + j0*CDX2 + j1*GATA6);  // modifiers: CDX2, GATA6; isVersionOf GO:0010467
  R10: GCNF => $degradation; gamma5*GCNF;  // isVersionOf GO:0030163
  R11: $GATA6_Gene => GATA6; (p0 + p1*OCT4 + p2*GATA6)/(1 + q0*OCT4 + q1*GATA6 + q2*NANOG + q3*SG);  // modifiers: OCT4, NANOG, SG; isVersionOf GO:0010467
  R12: GATA6 => $degradation; gammag*GATA6;  // isVersionOf GO:0030163

  // Unit definitions:
  unit substance = dimensionless; substance is "arb_substance";
  unit volume = litre; volume is "arb_volume";
  unit time = dimensionless; time is "arb_time";
end
