// SBML level 2 version 3

model NetLand_NetLand_seesaw()

  // Compartments:
  compartment cytosol = 1;
  compartment compartment = 1;

  // Species:
  substanceOnly species Oct4 in cytosol = 1;
  substanceOnly species Sox2 in cytosol = 1;
  substanceOnly species MEs in cytosol = 0;
  substanceOnly species ECTs in cytosol = 0;

  // Parameters:
  KM = 0.4;

  // Reactions:
  Oct4_synthesis: -> Oct4; 0.2*(0 + 1*0.7^8/(0.7^8 + MEs^8)*0.7^8/(0.7^8 + ECTs^8)*(KM + Oct4*Sox2/(0.35 + Oct4*Sox2))) - 0.2*Oct4; Oct4_synthesis is "0.2*(0+1*0.7^8/(0.7^8+MEs^8)*0.7^8/(0.7^8+ECTs^8)*(KM+Oct4*Sox2/(0.35+Oct4*Sox2)))-0.2*Oct4";  // modifiers: MEs, ECTs, Sox2
  Sox2_synthesis: -> Sox2; 0.2*(0 + 1*0.7^8/(0.7^8 + MEs^8)*0.7^8/(0.7^8 + ECTs^8)*(KM + Oct4*Sox2/(0.35 + Oct4*Sox2))) - 0.2*Sox2; Sox2_synthesis is "0.2*(0+1*0.7^8/(0.7^8+MEs^8)*0.7^8/(0.7^8+ECTs^8)*(KM+Oct4*Sox2/(0.35+Oct4*Sox2)))-0.2*Sox2";  // modifiers: MEs, ECTs, Oct4
  MEs_synthesis: -> MEs; 1*(0 + 1*0.8*Oct4^9/(1.3^9 + Oct4^9) + 1*0.55^10/(0.55^10 + Sox2^10)*0.3^8/(0.3^8 + ECTs^8) - MEs); MEs_synthesis is "1*(0+1*0.8*Oct4^9/(1.3^9+Oct4^9)+1*0.55^10/(0.55^10+Sox2^10)*0.3^8/(0.3^8+ECTs^8)-MEs)";  // modifiers: Oct4, Sox2, ECTs
  ECTs_synthesis: -> ECTs; 1*(0 + 1*0.8*Sox2^9/(1.3^9 + Sox2^9) + 1*0.55^10/(0.55^10 + Oct4^10)*0.3^8/(0.3^8 + MEs^8) - ECTs); ECTs_synthesis is "1*(0+1*0.8*Sox2^9/(1.3^9+Sox2^9)+1*0.55^10/(0.55^10+Oct4^10)*0.3^8/(0.3^8+MEs^8)-ECTs)";  // modifiers: Sox2, Oct4, MEs
end
